f(x) := (-12*x^4 + 5*x^3 - 23)/e^(13*x - x^2)*cos(log(x^2) - 15*π/7)
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x := -0.3
cc := (-12*x^4 + 5*x^3 - 23)/e^(13*x - x^2)
cc = -1255.81
df := (-12*x^4 + 5*x^3 - 23)/e^(13*x - x^2)*cos(log(x^2) - 15*π/7)
df = -95.6504
e^(13*x - x^2) = 0.0184997
